<neuroml xmlns="http://www.neuroml.org/schema/neuroml2"  xmlns:xs="http://www.w3.org/2001/XMLSchema" xmlns:xsi="http://www.w3.org/2001/XMLSchema-instance" xsi:schemaLocation="http://www.neuroml.org/schema/neuroml2 https://raw.github.com/NeuroML/NeuroML2/development/Schemas/NeuroML2/NeuroML_v2beta5.xsd" id="gocNetwork">
    <gapJunction id="GJ_0" conductance="426pS"/>
    <network id="gocNetwork" type="networkWithTemperature" temperature="23 degC">
        <population id="GoClPop" component="GoCl" size="45" type="populationList">
            <instance id="0">
                <location x="36.026141829724942" y="266.157397677981066" z="69.020366809019322"/>
            </instance>
            <instance id="1">
                <location x="336.498365092872803" y="292.782168727931776" z="50.760617433725699"/>
            </instance>
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        </population>
        <population id="MF_Poisson_pop" component="MF_Poisson" size="15" type="populationList">
            <instance id="0">
                <location x="76.804987035264759" y="215.993743685056842" z="37.492118923147316"/>
            </instance>
            <instance id="1">
                <location x="220.016103418896193" y="128.80509743546537" z="69.597935996631804"/>
            </instance>
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        </population>
        <projection id="MF2toGoC" presynapticPopulation="MF_Poisson_pop" postsynapticPopulation="GoClPop" synapse="MFGoC_Syn">
            <connection id="0" preCellId="../MF_Poisson_pop/0/MF_Poisson" postCellId="../GoClPop/4/GoCl"/>
            <connection id="1" preCellId="../MF_Poisson_pop/0/MF_Poisson" postCellId="../GoClPop/6/GoCl"/>
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        </projection>
        <electricalProjection id="gocGJ" presynapticPopulation="GoClPop" postsynapticPopulation="GoClPop">
            <electricalConnectionInstanceW id="0" preCell="../GoClPop/0/GoCl" preSegment="1" postCell="../GoClPop/3/GoCl" postSegment="1" synapse="GJ_0" weight="8."/>
            <electricalConnectionInstanceW id="1" preCell="../GoClPop/0/GoCl" preSegment="1" postCell="../GoClPop/13/GoCl" postSegment="1" synapse="GJ_0" weight="2."/>
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        </electricalProjection>
        <explicitInput target="../GoClPop/43/GoCl" input="MF_Burst"/>
        <explicitInput target="../GoClPop/43/GoCl" input="MF_Burst"/>
        <explicitInput target="../GoClPop/43/GoCl" input="MF_Burst"/>
        <explicitInput target="../GoClPop/43/GoCl" input="MF_Burst"/>
        <explicitInput target="../GoClPop/19/GoCl" input="MF_Burst"/>
        <explicitInput target="../GoClPop/19/GoCl" input="MF_Burst"/>
        <explicitInput target="../GoClPop/19/GoCl" input="MF_Burst"/>
        <explicitInput target="../GoClPop/19/GoCl" input="MF_Burst"/>
        <explicitInput target="../GoClPop/8/GoCl" input="MF_Burst"/>
        <explicitInput target="../GoClPop/8/GoCl" input="MF_Burst"/>
        <explicitInput target="../GoClPop/8/GoCl" input="MF_Burst"/>
        <explicitInput target="../GoClPop/8/GoCl" input="MF_Burst"/>
        <explicitInput target="../GoClPop/10/GoCl" input="MF_Burst"/>
        <explicitInput target="../GoClPop/10/GoCl" input="MF_Burst"/>
        <explicitInput target="../GoClPop/10/GoCl" input="MF_Burst"/>
        <explicitInput target="../GoClPop/10/GoCl" input="MF_Burst"/>
    </network>
</neuroml>
